Simulations: Version=178
  DataStore
    ExcelInput: FileNames=[Observed.xlsx]; SheetNames=[Observed]
    PredictedObserved HarvestObsPred: PredictedTableName=HarvestReport; ObservedTableName=Observed; FieldNameUsedForMatch=SimulationName; FieldName2UsedForMatch=Lentil.Phenology.CurrentStageName; AllColumns=false
  Folder Replacements
    Plant Lentil: PlantType=Lentil
      Memo TitlePage
        The model consists of:

        * a phenology model to simulate development between growth phases
        * a structure model to simulate plant morphology
        * a collection of organs to simulate the various plant parts
        * an arbitrator to allocate resources (N, biomass) to the various plant organs
      OrganArbitrator Arbitrator
        BiomassTypeArbitrator DMArbitration
          Folder PotentialPartitioningMethods
            ReallocationMethod
            AllocateFixationMethod
            RetranslocationMethod
            SendPotentialDMAllocationsMethod
          Folder AllocationMethods
            NutrientConstrainedAllocationMethod
            DryMatterAllocationsMethod
          RelativeAllocation ArbitrationMethod
        BiomassTypeArbitrator NArbitration
          Folder PotentialPartitioningMethods
            ReallocationMethod
          Folder ActualPartitioningMethods
            AllocateFixationMethod
            RetranslocationMethod
          Folder AllocationMethods
            NitrogenAllocationsMethod
          RelativeAllocation ArbitrationMethod
          AllocateUptakesMethod
        WaterUptakeMethod
        NitrogenUptakeMethod
      Phenology
        Memo Introduction
          In the new model we simplified phenology by taking out stages that are not measurable (e.g. end of juvenile stage) and by adding new stages that are measurable (e.g. start pod).
          The new phenology follows the V/R staging system
        LinearInterpolationFunction PreemergentThermalTime
          XYPairs: X=[13, 25, 50]; Y=[0, 12, 0]
          Memo
            These parameters are overridden by cultivar parameter descriptions to capture the difference between individual cultivars in terms of their phenological development.  Responses shown here are only indicative.  See cultivar descriptions for more information.
          VariableReference XValue: VariableName=[IWeather].MeanT
        LinearInterpolationFunction VegetativeThermalTime
          XYPairs: X=[9, 32, 50]; Y=[0, 23, 0]
          Memo
            These parameters are overridden by cultivar parameter descriptions to capture the difference between individual cultivars in terms of their phenological development.  Responses shown here are only indicative.  See cultivar descriptions for more information.
          VariableReference XValue: VariableName=[IWeather].MeanT
        LinearInterpolationFunction ReproductiveThermalTime
          XYPairs: X=[0, 22, 32, 40]; Y=[13, 13, 23, 23]
          VariableReference XValue: VariableName=[IWeather].MeanT
        PhaseLookup ThermalTime
          PhaseLookupValue PreEmergence: Start=Sowing; End=Emergence
            VariableReference TT: VariableName=[Phenology].PreemergentThermalTime
          PhaseLookupValue VegetativeGrowth: Start=Emergence; End=StartFlowering
            VariableReference TT: VariableName=[Phenology].VegetativeThermalTime
          PhaseLookupValue ReproductiveGrowth: Start=StartFlowering; End=HarvestRipe
            MultiplyFunction TT
              VariableReference ReproductiveTT: VariableName=[Phenology].ReproductiveThermalTime
              LinearInterpolationFunction PPModifier
                XYPairs: X=[13, 16, 20]; Y=[1, 1, 1]
                VariableReference XValue: VariableName=[Phenology].Photoperiod
        PhotoperiodFunction Photoperiod: Twilight=-6; DayLength=0
        GerminatingPhase Germinating: Start=Sowing; End=Germination; IsEmerged=false
          Constant MinSoilTemperature: FixedValue=0
        EmergingPhase Emerging: Start=Germination; End=Emergence; IsEmerged=false; TTForTimeStep=0
          VariableReference ThermalTime: VariableName=[Phenology].PreemergentThermalTime
          AddFunction Target
            Constant ShootLag: FixedValue=70
            MultiplyFunction DepthxRate
              VariableReference SowingDepth: VariableName=[Plant].SowingData.Depth
              Constant ShootRate: FixedValue=0
        GenericPhase Vegetative: Start=Emergence; End=StartFlowering; IsEmerged=true
          Constant Target: FixedValue=390
          VariableReference Progression: VariableName=[Phenology].ThermalTime
        GenericPhase EarlyFlowering: Start=StartFlowering; End=StartPodDevelopment; IsEmerged=true
          Constant Target: FixedValue=200
          VariableReference Progression: VariableName=[Phenology].ThermalTime
        GenericPhase EarlyPodDevelopment: Start=StartPodDevelopment; End=StartGrainFilling; IsEmerged=true
          Constant Target: FixedValue=140
          VariableReference Progression: VariableName=[Phenology].ThermalTime
        GenericPhase EarlyGrainFilling: Start=StartGrainFilling; End=EndCanopyDevelopment; IsEmerged=true
          MultiplyFunction Target
            Constant FractionofGrainfilling: FixedValue=0.05
            VariableReference EntireGrainfilling
              VariableName=[Phenology].LateGrainFilling.Target.EntireGrainfillPeriod.FixedValue
          VariableReference Progression: VariableName=[Phenology].ThermalTime
        GenericPhase MidGrainFilling: Start=EndCanopyDevelopment; End=EndPodDevelopment; IsEmerged=true
          MultiplyFunction Target
            Constant FractionofMidToLateGrainfilling: FixedValue=0.5
            SubtractFunction MidToLateGrainfilling
              VariableReference EntireGrainfilling
                VariableName=[Phenology].LateGrainFilling.Target.EntireGrainfillPeriod.FixedValue
              VariableReference EarlyGrainfilling: VariableName=[Phenology].EarlyGrainFilling.Target
          VariableReference Progression: VariableName=[Phenology].ThermalTime
        GenericPhase LateGrainFilling: Start=EndPodDevelopment; End=EndGrainFill; IsEmerged=true
          SubtractFunction Target
            Constant EntireGrainfillPeriod: FixedValue=1020
            VariableReference EarlyGrainFillingTarget: VariableName=[Phenology].EarlyGrainFilling.Target
            VariableReference MidGrainFillingTarget: VariableName=[Phenology].MidGrainFilling.Target
          VariableReference Progression: VariableName=[Phenology].ThermalTime
        GenericPhase Maturing: Start=EndGrainFill; End=Maturity; IsEmerged=true
          Constant Target: FixedValue=45
          VariableReference Progression: VariableName=[Phenology].ThermalTime
        GenericPhase Ripening: Start=Maturity; End=HarvestRipe; IsEmerged=true
          Constant Target: FixedValue=45
          VariableReference Progression: VariableName=[Phenology].ThermalTime
        EndPhase ReadyForHarvesting: Start=HarvestRipe; End=Unused; IsEmerged=true
          VariableReference ThermalTime: VariableName=[Phenology].ThermalTime
        OnEventFunction EmergenceDAS: SetEvent=Emergence; ReSetEvent=never
          Memo
            A function is used to provide maturity date as days after sowing(DAS).
          Constant PreEventValue: FixedValue=0
          VariableReference PostEventValue: VariableName=[Plant].DaysAfterSowing
        OnEventFunction StartFloweringDAS: SetEvent=StartFlowering; ReSetEvent=never
          Memo
            A function is used to provide flowering date as days after sowing(DAS).
          Constant PreEventValue: FixedValue=0
          VariableReference PostEventValue: VariableName=[Plant].DaysAfterSowing
        OnEventFunction PodEmergenceDAS: SetEvent=StartPodDevelopment; ReSetEvent=never
          Memo
            A function is used to provide flowering date as days after sowing(DAS).
          Constant PreEventValue: FixedValue=0
          VariableReference PostEventValue: VariableName=[Plant].DaysAfterSowing
        OnEventFunction MaturityDAS: SetEvent=Maturity; ReSetEvent=never
          Memo
            A function is used to provide maturity date as days after sowing(DAS).
          Constant PreEventValue: FixedValue=0
          VariableReference PostEventValue: VariableName=[Plant].DaysAfterSowing
        AccumulateFunction DaysAfterEmergence: StartStageName=Emergence; EndStageName=HarvestRipe; FractionRemovedOnCut=0; FractionRemovedOnHarvest=0; FractionRemovedOnGraze=0; FractionRemovedOnPrune=0
          Constant OneDay: FixedValue=1
      SimpleLeaf Leaf: Albedo=0.25; Gsmax350=0.011; R50=150; LeafInitialisationStage=Emergence; Height=0; BaseHeight=0; Width=0; FRGR=0; PotentialEP=0; WaterDemand=0; KDead=0.3; LAIDead=0
        RUEModel Photosynthesis
          Constant RUE: FixedValue=1.5
            Memo
              This approach is based upon the value used in [robertson_simulation_2002] increased to account for partitioning to roots.
          WeightedTemperatureFunction FT: MaximumTemperatureWeighting=0.75
            Memo
              This approach is based upon that used in Bell, WRight and Hammer (1992) Crop Sci
            XYPairs: X=[10, 21, 35, 40]; Y=[0, 1, 1, 0]
          LinearInterpolationFunction FVPD
            XYPairs: X=[0, 10, 50]; Y=[1, 1, 1]
            VariableReference XValue: VariableName=[Leaf].Photosynthesis.VPD
          LinearInterpolationFunction FN
            XYPairs: X=[0, 1, 1.5]; Y=[0, 1, 1]
            VariableReference XValue: VariableName=[Leaf].Fn
          LinearInterpolationFunction FW
            XYPairs: X=[0, 1]; Y=[0, 1]
            VariableReference XValue: VariableName=[Leaf].Fw
          RUECO2Function FCO2: PhotosyntheticPathway=C3
          VariableReference RadnInt: VariableName=[Leaf].RadiationIntercepted
        StomatalConductanceCO2Modifier
          VariableReference PhotosynthesisCO2Modifier: VariableName=[Leaf].Photosynthesis.FCO2
        AddFunction Area
          MultiplyFunction Initial
            Constant AreaPerPlant: FixedValue=0.005
            VariableReference Population: VariableName=[Lentil].SowingData.Population
          SubtractFunction Change
            AccumulateAtEvent AreaGrowth: StartStageName=Emergence; EndStageName=EndCanopyDevelopment; AccumulateEventName=[Clock].DoActualPlantGrowth
              MultiplyFunction DeltaArea
                VariableReference DeltaMass: VariableName=[Leaf].Allocated.StructuralWt
                VariableReference SLA: VariableName=[Leaf].SpecificArea
            AccumulateAtEvent AreaLoss: StartStageName=EndCanopyDevelopment; EndStageName=HarvestRipe; AccumulateEventName=[Clock].DoActualPlantGrowth
              MultiplyFunction DeltaArea
                VariableReference DeltaMass: VariableName=[Leaf].Senesced.StructuralWt
                VariableReference SLA: VariableName=[Leaf].SpecificAreaCanopy
        MinimumFunction FRGR
          VariableReference RUE_FT: VariableName=[Leaf].Photosynthesis.FT
          MinimumFunction Others
            VariableReference RUE_FN: VariableName=[Leaf].Photosynthesis.FN
            VariableReference RUE_FVPD: VariableName=[Leaf].Photosynthesis.FVPD
        LinearInterpolationFunction ExtinctionCoefficient
          Memo
            This approach is based upon that described by [Porter2000PhD] to account for the impacts of population and row/plant spacing.  Extinction coefficient is said to decrease with decreasing inter-plant spacing within the plant row.
          XYPairs: X=[0, 335]; Y=[0.214, 0.7]
          ExpressionFunction XValue
            Expression=divide(divide(1000000,[Lentil].SowingData.Population),[Lentil].SowingData.RowSpacing)
        LinearInterpolationFunction HeightFunction
          XYPairs: X=[1, 2, 3, 4, 5, 6, 9]; Y=[0, 0, 50, 400, 450, 450, 450]
          VariableReference XValue: VariableName=[Phenology].Stage
        AccumulateFunction NodeNumber: StartStageName=Emergence; EndStageName=EndCanopyDevelopment; FractionRemovedOnCut=1; FractionRemovedOnHarvest=1; FractionRemovedOnGraze=1; FractionRemovedOnPrune=0
          DivideFunction DeltaNode
            VariableReference ThermalTime: VariableName=[Phenology].VegetativeThermalTime
            VariableReference Phyllochron: VariableName=[Leaf].Phyllochron
        AddFunction BranchNumber
          Constant One: FixedValue=1
          AccumulateFunction CumulativeBranching: StartStageName=Emergence; EndStageName=EndCanopyDevelopment; FractionRemovedOnCut=1; FractionRemovedOnHarvest=1; FractionRemovedOnGraze=1; FractionRemovedOnPrune=0
            MultiplyFunction DeltaBranch
              VariableReference DeltaNode: VariableName=[Leaf].NodeNumber.DeltaNode
              VariableReference BranchingRate: VariableName=[Leaf].BranchingRate
              LinearInterpolationFunction TemperatureFactor
                XYPairs: X=[20, 28, 32, 40]; Y=[1, 1, 1, 1]
                VariableReference XValue: VariableName=[Weather].MeanT
              LinearInterpolationFunction WaterFactor
                XYPairs: X=[0.5, 1]; Y=[0, 1]
                VariableReference XValue: VariableName=[Leaf].Fw
              LinearInterpolationFunction CoverFactor
                XYPairs: X=[0, 0.33, 0.5, 1]; Y=[1, 1, 0, 0]
                VariableReference XValue: VariableName=[Leaf].CoverTotal
              LinearInterpolationFunction PPFactor
                XYPairs: X=[12, 13]; Y=[0, 1]
                VariableReference XValue: VariableName=[Phenology].Photoperiod
        AccumulateFunction Number: StartStageName=Emergence; EndStageName=EndCanopyDevelopment; FractionRemovedOnCut=1; FractionRemovedOnHarvest=1; FractionRemovedOnGraze=1; FractionRemovedOnPrune=0
          MultiplyFunction DailyNumberIncrease
            VariableReference DeltaNode: VariableName=[Leaf].NodeNumber.DeltaNode
            VariableReference BranchNumber: VariableName=[Leaf].BranchNumber
            VariableReference PlantNumber: VariableName=[Lentil].SowingData.Population
        Constant NReallocationFactor: FixedValue=1
          Memo
            This model assumes that all metabolic and storage N is available for reallocation from senescing leaves.
        PhaseLookup SenescenceRate
          PhaseLookupValue Vegetative: Start=Emergence; End=EndPodDevelopment
            Constant Rate: FixedValue=0
          PhaseLookupValue Reproductive: Start=EndPodDevelopment; End=Maturity
            Memo
              Leaf senescence rate is calculated to ensure that all leaves are senesced by crop maturity.
            DivideFunction Rate
              VariableReference TT: VariableName=[Phenology].ThermalTime
              SubtractFunction TTRemaining
                ExpressionFunction TTRequired
                  Expression=[Phenology].LateGrainFilling.Target + [Phenology].Maturing.Target + 1000
                ExpressionFunction TTComplete
                  Expression=[Phenology].LateGrainFilling.ProgressThroughPhase + [Phenology].Maturing.ProgressThroughPhase
              Constant Modifier: FixedValue=1
          PhaseLookupValue Senescent: Start=Maturity; End=HarvestRipe
            Memo
              Leaf senescence rate is calculated to ensure that all leaves are senesced by crop maturity.
            Constant Rate: FixedValue=0.1
        Constant DetachmentRate: FixedValue=0.05; Units=/d
        MultiplyFunction InitialWt
          Constant MassPerPlant: FixedValue=0.06
          VariableReference Population: VariableName=[Lentil].SowingData.Population
        MultiplyFunction LAIDead
          VariableReference SLA: VariableName=[Leaf].SpecificAreaCanopy
          VariableReference LeafDeadWt: VariableName=[Leaf].Dead.Wt
        LinearInterpolationFunction MaximumNConc
          XYPairs: X=[3, 4, 9]; Y=[0.06, 0.05, 0.03]
          VariableReference XValue: VariableName=[Phenology].Stage
        LinearInterpolationFunction CriticalNConc
          XYPairs: X=[3, 4, 9]; Y=[0.06, 0.05, 0.03]
          VariableReference XValue: VariableName=[Phenology].Stage
        Constant MinimumNConc: FixedValue=0.02
        Constant MaintenanceRespiration: FixedValue=0; Units=0-1
        Constant DMConversionEfficiency: FixedValue=1; Units=0-1
        BiomassRemoval BiomassRemovalDefaults: HarvestFractionLiveToRemove=0; HarvestFractionDeadToRemove=0; HarvestFractionLiveToResidue=1; HarvestFractionDeadToResidue=1
        Constant NRetranslocationFactor: FixedValue=0.5
        Constant DMReallocationFactor: FixedValue=0
        Constant DMRetranslocationFactor: FixedValue=0.5
        Constant RemobilisationCost: FixedValue=0
        Constant CarbonConcentration: FixedValue=0.4
        NutrientDemandFunctions DMDemands
          DivideFunction Structural
            VariableReference DeltaLAI: VariableName=[Leaf].DeltaLAI
            VariableReference SLA: VariableName=[Leaf].SpecificArea
            Memo
              Growth in leaf area is used to calculate the leaf dry matter demand.  Note that leaf biomass is assumed to consist of entirely structural dry matter.
          Constant Storage: FixedValue=0
          Constant Metabolic: FixedValue=0
          Constant QStructuralPriority: FixedValue=1
          Constant QMetabolicPriority: FixedValue=1
          Constant QStoragePriority: FixedValue=1
        NutrientDemandFunctions NDemands
          MultiplyFunction Structural
            VariableReference MinNconc: VariableName=[Leaf].minimumNconc
            VariableReference PotentialDMAllocation: VariableName=[Leaf].potentialDMAllocation.Structural
          MultiplyFunction Metabolic
            SubtractFunction MetabolicNconc
              VariableReference CritNconc: VariableName=[Leaf].criticalNConc
              VariableReference MinNconc: VariableName=[Leaf].minimumNconc
            VariableReference PotentialDMAllocation: VariableName=[Leaf].potentialDMAllocation.Structural
          StorageNDemandFunction Storage
            Constant NitrogenDemandSwitch: FixedValue=1
            VariableReference MaxNconc: VariableName=[Leaf].maximumNconc
          Constant QStructuralPriority: FixedValue=1
          Constant QMetabolicPriority: FixedValue=1
          Constant QStoragePriority: FixedValue=1
        LinearInterpolationFunction SpecificArea
          XYPairs: X=[0, 17, 21, 35]; Y=[0.027, 0.027, 0.027, 0.027]
          VariableReference XValue: VariableName=[Weather].MinT
        PhaseLookup DeltaLAI
          PhaseLookupValue Vegetative: Start=Emergence; End=EndCanopyDevelopment
            MultiplyFunction Delta
              VariableReference AreaLargestLeaf: VariableName=[Leaf].AreaLargestLeaf
              PhaseLookup RelativeArea
                PhaseLookupValue BeforeEndPod: Start=Emergence; End=StartPodDevelopment
                  LinearInterpolationFunction RelativeArea
                    Memo
                      This approach is based upon that used in [robertson_simulation_2002].
                    XYPairs: X=[2, 4, 6, 7, 10]; Y=[0.5, 1, 1, 1, 1]
                    VariableReference XValue: VariableName=[Leaf].NodeNumber
                PhaseLookupValue AfterEndPod: Start=StartPodDevelopment; End=EndCanopyDevelopment
                  Constant RelativeArea: FixedValue=1
              VariableReference PlantNumber: VariableName=[Lentil].SowingData.Population
              VariableReference BranchNumber: VariableName=[Leaf].BranchNumber
              DivideFunction LAR
                VariableReference TT: VariableName=[Phenology].VegetativeThermalTime
                VariableReference Phyllochron: VariableName=[Leaf].Phyllochron
              LinearInterpolationFunction LeafSizeTemperatureFactor
                XYPairs: X=[20, 22, 32, 40]; Y=[1, 1, 1, 0]
                VariableReference XValue: VariableName=[Weather].MeanT
          PhaseLookupValue Reproductive: Start=EndCanopyDevelopment; End=Maturity
            Constant: FixedValue=0
        Constant AreaLargestLeaf: FixedValue=0.0014
        DivideFunction SpecificAreaCanopy
          VariableReference LAI: VariableName=[Leaf].Area
          VariableReference LeafWt: VariableName=[Leaf].Live.Wt
        PhaseLookup Phyllochron
          PhaseLookupValue EarlyVegetative: Start=Emergence; End=StartGrainFilling
            Constant Phyllochron: FixedValue=56
              Memo
                This value is based upon that used in [robertson_simulation_2002].
          PhaseLookupValue LateVegetative: Start=StartGrainFilling; End=EndCanopyDevelopment
            MultiplyFunction Phyllochron
              Constant Base: FixedValue=56
                Memo
                  This value is based upon that used in [robertson_simulation_2002].
              LinearInterpolationFunction PPFactor
                XYPairs: X=[10, 12, 12.8, 14]; Y=[10, 10, 1, 1]
                VariableReference XValue: VariableName=[Phenology].Photoperiod
          PhaseLookupValue Reproductive: Start=EndCanopyDevelopment; End=Maturity
            Constant: FixedValue=0
        LinearInterpolationFunction BranchingRate
          Memo
            From Hammer Paper
          XYPairs: X=[0, 1, 2, 3, 15, 16]; Y=[0, 2, 1, 0.5, 0.5, 0]
          VariableReference XValue: VariableName=[Leaf].NodeNumber
      ReproductiveOrgan Grain: GrowthRespiration=0; MaintenanceRespiration=0
        Biomass Live
        Biomass Dead
        AddFunction FillingDuration
          VariableReference EarlyGrainFillingDuration: VariableName=[Phenology].EarlyGrainFilling.Target
          VariableReference MidGrainFillingDuration: VariableName=[Phenology].MidGrainFilling.Target
          VariableReference LateGrainFillingDuration: VariableName=[Phenology].LateGrainFilling.Target
        PhaseLookup DMDemandFunction
          PhaseLookupValue GrainFilling: Start=StartGrainFilling; End=EndGrainFill
            MultiplyFunction HIGrainDemand
              VariableReference AboveGroundWt: VariableName=[AboveGround].Wt
              DivideFunction HarvestIndexIncrease
                MaximumFunction OutstandingHarvestIndexIncrease
                  ExpressionFunction Increase: Expression=[Grain].PotentialHarvestIndex - [Grain].HarvestIndex
                  Constant Zero: FixedValue=0
                SubtractFunction TTRemaining
                  ExpressionFunction ReproductiveTT
                    Expression=[Phenology].EarlyGrainFilling.Target+[Phenology].MidGrainFilling.Target+[Phenology].LateGrainFilling.Target
                  ExpressionFunction ReproductiveTTComplete
                    Expression=[Phenology].EarlyGrainFilling.ProgressThroughPhase+[Phenology].MidGrainFilling.ProgressThroughPhase+[Phenology].LateGrainFilling.ProgressThroughPhase
              VariableReference ThermalTime: VariableName=[Phenology].ThermalTime
        Constant MinimumNConc: FixedValue=0.05
        Constant MaximumNConc: FixedValue=0.058
        Constant WaterContent: FixedValue=0.13
        MultiplyFunction NFillingRate
          VariableReference NConc: VariableName=[Grain].MaximumNConc
          VariableReference DMDemand: VariableName=[Grain].DMDemandFunction
          VariableReference DMConversionEfficiency: VariableName=[Grain].DMConversionEfficiency
        BiomassRemoval BiomassRemovalDefaults: HarvestFractionLiveToRemove=1; HarvestFractionDeadToRemove=1; HarvestFractionLiveToResidue=0; HarvestFractionDeadToResidue=0
        Constant DMConversionEfficiency: FixedValue=0.89
        Constant RemobilisationCost: FixedValue=0
        Constant CarbonConcentration: FixedValue=0.4
        DivideFunction HarvestIndex
          VariableReference GrainWt: VariableName=[Grain].Wt
          VariableReference AboveGroundWt: VariableName=[AboveGround].Wt
        Constant MaximumPotentialGrainSize: FixedValue=0
          Memo
            This parameter is not used.  Grain growth is calculated from harvest index increase.
        Constant NumberFunction: FixedValue=0
          Memo
            Grain number is not estimated by this model.
        MultiplyFunction PotentialHarvestIndex
          VariableReference PodHarvestIndex: VariableName=[Pod].PotentialHarvestIndex
          Constant GrainFraction: FixedValue=0.72; Units=0-1
        NutrientPoolFunctions DMDemandPriorityFactors
          Constant Structural: FixedValue=1
          Constant Metabolic: FixedValue=1
          Constant Storage: FixedValue=1
        NutrientPoolFunctions NDemandPriorityFactors: same as Replacements.Lentil.Grain.DMDemandPriorityFactors
      Root: GrowthRespiration=0; MaintenanceRespiration=0
        RootShapeCylinder RootShape
        LinearInterpolationFunction KLModifier
          XYPairs: X=[0, 3]; Y=[1, 1]
          VariableReference XValue: VariableName=[Leaf].LAI
        SubDailyInterpolation TemperatureEffect: agregationMethod=0
          XYPairs Response: X=[0, 26, 35]; Y=[1, 1, 1]
          ThreeHourAirTemperature InterpolationMethod
        LinearInterpolationFunction MaxDailyNUptake
          XYPairs: X=[0, 5]; Y=[1, 3]
          VariableReference XValue: VariableName=[Leaf].LAI
        Constant SenescenceRate: FixedValue=0.005
        Constant MaximumRootDepth: FixedValue=1000000
        PhaseLookup RootFrontVelocity
          Memo
            This approach is based upon that used in [robertson_simulation_2002].
          PhaseLookupValue PreEmergence: Start=Germination; End=Emergence
            Constant Function: FixedValue=15
          PhaseLookupValue early: Start=Emergence; End=StartGrainFilling
            Constant Function: FixedValue=35
          PhaseLookupValue late: Start=StartGrainFilling; End=Maturity
            Constant Function: FixedValue=0
        Constant MaximumNConc: FixedValue=0.01
        Constant MinimumNConc: FixedValue=0.005
        PhaseLookupValue NitrogenDemandSwitch: Start=Emergence; End=EndGrainFill
          Constant: FixedValue=1
        Constant KNO3: FixedValue=0.02
        Constant KNH4: FixedValue=0
          Memo
            The current model version considers only NO3 uptake but NH4 option can be activated by the user . We do not expect activation of NH4 to change total plant N uptake because the nitrification rate (conversion of NH4 to NO3) is very fast in the model. In the future we will re-valuate this.
        BiomassRemoval BiomassRemovalDefaults: HarvestFractionLiveToRemove=0; HarvestFractionDeadToRemove=0; HarvestFractionLiveToResidue=0.2; HarvestFractionDeadToResidue=0
        LinearInterpolationFunction NUptakeSWFactor
          XYPairs: X=[0, 1]; Y=[0, 1]
          VariableReference XValue: VariableName=[Root].RWC
        Constant SpecificRootLength: FixedValue=60; Units=m/g
          Memo
            This approach is based upon that used in [robertson_simulation_2002].
        Constant DMConversionEfficiency: FixedValue=1
        Constant MaintenanceRespirationFunction: FixedValue=1
        Constant RemobilisationCost: FixedValue=0
        Constant CarbonConcentration: FixedValue=0.4
        NutrientDemandFunctions DMDemands
          MultiplyFunction Structural
            PartitionFractionDemandFunction DMDemandFunction
              PhaseLookup PartitionFraction
                PhaseLookupValue Early: Start=Emergence; End=StartFlowering
                  Constant Function: FixedValue=0.2
                PhaseLookupValue Middle: Start=StartFlowering; End=StartGrainFilling
                  Constant Function: FixedValue=0.2
                PhaseLookupValue Late: Start=StartGrainFilling; End=Maturity
                  Constant Function: FixedValue=0.05
            Constant StructuralFraction: FixedValue=1
          Constant Metabolic: FixedValue=0
          StorageDMDemandFunction Storage
            SubtractFunction StorageFraction
              Constant One: FixedValue=1
              VariableReference StructuralFraction: VariableName=[Root].DMDemands.Structural.StructuralFraction
          Constant QStructuralPriority: FixedValue=1
          Constant QMetabolicPriority: FixedValue=1
          Constant QStoragePriority: FixedValue=1
        NutrientDemandFunctions NDemands
          MultiplyFunction Structural
            VariableReference MinNconc: VariableName=[Root].minimumNconc
            VariableReference PotentialDMAllocation: VariableName=[Root].potentialDMAllocation.Structural
          MultiplyFunction Metabolic
            SubtractFunction MetabolicNconc
              VariableReference CritNconc: VariableName=[Root].criticalNConc
              VariableReference MinNconc: VariableName=[Root].minimumNconc
            VariableReference PotentialDMAllocation: VariableName=[Root].potentialDMAllocation.Structural
          StorageNDemandFunction Storage
            VariableReference NitrogenDemandSwitch: VariableName=[Root].nitrogenDemandSwitch
            VariableReference MaxNconc: VariableName=[Root].maximumNconc
          Constant QStructuralPriority: FixedValue=1
          Constant QMetabolicPriority: FixedValue=1
          Constant QStoragePriority: FixedValue=1
        VariableReference CriticalNConc: VariableName=[Root].MinimumNConc
        NutrientPoolFunctions InitialWt
          Constant Structural: FixedValue=0.1; Units=g/plant
          Constant Metabolic: FixedValue=0
          Constant Storage: FixedValue=0
      Nodule
        Constant FixationMetabolicCost: FixedValue=0
        Constant MaximumNConc: FixedValue=0.02
        Constant MinimumNConc: FixedValue=0.01
        Constant SenescenceRate: FixedValue=0
        Constant NReallocationFactor: FixedValue=0
        PhaseLookupValue NitrogenDemandSwitch: Start=Emergence; End=EndGrainFill
          Constant: FixedValue=1
        BiomassRemoval BiomassRemovalDefaults: HarvestFractionLiveToRemove=0; HarvestFractionDeadToRemove=0; HarvestFractionLiveToResidue=0.2; HarvestFractionDeadToResidue=0
        Constant InitialWtFunction: FixedValue=0; Units=g/m^2
        Constant DetachmentRateFunction: FixedValue=0; Units=/d
        Constant MaintenanceRespirationFunction: FixedValue=0; Units=0-1
        Constant DMConversionEfficiency: FixedValue=1; Units=0-1
        Constant NRetranslocationFactor: FixedValue=0
        Constant DMReallocationFactor: FixedValue=0
        Constant DMRetranslocationFactor: FixedValue=0
        VariableReference CriticalNConc: VariableName=[Nodule].MinimumNConc
        Constant RemobilisationCost: FixedValue=0
        Constant CarbonConcentration: FixedValue=0.4
        HoldFunction FixationRate: WhenToHold=StartGrainFilling
          MinimumFunction DailyPotentialFixationRate
            MultiplyFunction PotentialFixationRate
              VariableReference LiveBiomass: VariableName=[AboveGroundLive].Wt
              PhaseLookup SpecificFixationRate
                PhaseLookupValue VegetativeGrowth: Start=Emergence; End=StartFlowering
                  Constant Rate: FixedValue=0.006
                PhaseLookupValue ReproductiveGrowth: Start=StartFlowering; End=EndGrainFill
                  Constant Rate: FixedValue=0.002
            Constant MaximumFixationRate: FixedValue=0.6
        NutrientPoolFunctions DMDemands
          MultiplyFunction Structural
            PartitionFractionDemandFunction DMDemandFunction
              PhaseLookup PartitionFraction
                PhaseLookupValue Early: Start=Emergence; End=StartFlowering
                  Constant Function: FixedValue=0.03
                PhaseLookupValue Middle: Start=StartFlowering; End=StartGrainFilling
                  Constant Function: FixedValue=0.02
                PhaseLookupValue Late: Start=StartGrainFilling; End=Maturity
                  Constant Function: FixedValue=0
            Constant StructuralFraction: FixedValue=1; Units=g/g
          Constant Metabolic: FixedValue=0
          StorageDMDemandFunction Storage
            SubtractFunction StorageFraction
              Constant One: FixedValue=1
              VariableReference StructuralFraction: VariableName=[Nodule].DMDemands.Structural.StructuralFraction
        NutrientPoolFunctions NDemands
          MultiplyFunction Structural
            VariableReference MinNconc: VariableName=[Nodule].minimumNconc
            VariableReference PotentialDMAllocation: VariableName=[Nodule].potentialDMAllocation.Structural
          MultiplyFunction Metabolic
            SubtractFunction MetabolicNconc
              VariableReference CritNconc: VariableName=[Nodule].criticalNConc
              VariableReference MinNconc: VariableName=[Nodule].minimumNconc
            VariableReference PotentialDMAllocation: VariableName=[Nodule].potentialDMAllocation.Structural
          StorageNDemandFunction Storage
            VariableReference NitrogenDemandSwitch: VariableName=[Nodule].nitrogenDemandSwitch
            VariableReference MaxNconc: VariableName=[Nodule].maximumNconc
      GenericOrgan Shell: IsAboveGround=true
        Constant NReallocationFactor: FixedValue=1
        Constant NRetranslocationFactor: FixedValue=0.5
        Constant MaximumNConc: FixedValue=0.045
        VariableReference CriticalNConc: VariableName=[Shell].MinimumNConc
        Constant MinimumNConc: FixedValue=0.01
        Constant DMRetranslocationFactor: FixedValue=0.1
        PhaseLookupValue NitrogenDemandSwitch: Start=StartPodDevelopment; End=EndPodDevelopment
          Constant: FixedValue=1
        BiomassRemoval BiomassRemovalDefaults: HarvestFractionLiveToRemove=0; HarvestFractionDeadToRemove=0; HarvestFractionLiveToResidue=1; HarvestFractionDeadToResidue=1
        PhaseLookup SenescenceRate
          PhaseLookupValue ReproductivePhase: Start=StartPodDevelopment; End=Maturity
            MinimumFunction Rate
              DivideFunction Fraction
                VariableReference TT: VariableName=[Phenology].ThermalTime
                SubtractFunction TTRemaining
                  ExpressionFunction ReproductiveTT
                    Expression=[Phenology].EarlyPodDevelopment.Target+[Phenology].EarlyGrainFilling.Target+[Phenology].MidGrainFilling.Target+[Phenology].LateGrainFilling.Target
                  ExpressionFunction ReproductiveTT1Complete
                    Expression=[Phenology].EarlyPodDevelopment.ProgressThroughPhase+[Phenology].EarlyGrainFilling.ProgressThroughPhase+[Phenology].MidGrainFilling.ProgressThroughPhase+[Phenology].LateGrainFilling.ProgressThroughPhase
              Constant One: FixedValue=1
        Constant DetachmentRateFunction: FixedValue=0; Units=/d
        Constant MaintenanceRespirationFunction: FixedValue=0; Units=0-1
        Constant DMConversionEfficiency: FixedValue=1; Units=0-1
        Constant DMReallocationFactor: FixedValue=0
        Constant RemobilisationCost: FixedValue=0
        Constant CarbonConcentration: FixedValue=0.4
        AddFunction FillingDuration
          VariableReference EarlyPodDevelopmentDuration: VariableName=[Phenology].EarlyPodDevelopment.Target
          VariableReference EarlyGrainFillingDuration: VariableName=[Phenology].EarlyGrainFilling.Target
          VariableReference MidGrainFillingDuration: VariableName=[Phenology].MidGrainFilling.Target
        NutrientDemandFunctions DMDemands
          MultiplyFunction Structural
            PhaseLookup DMDemandFunction
              PhaseLookupValue PodDevelopment: Start=StartPodDevelopment; End=EndPodDevelopment
                MultiplyFunction HIPodDemand
                  VariableReference AboveGroundWt: VariableName=[AboveGround].Wt
                  DivideFunction HarvestIndexIncrease
                    MaximumFunction OutstandingHarvestIndexIncrease
                      ExpressionFunction Increase: Expression=[Shell].PotentialHarvestIndex - [Shell].HarvestIndex
                      Constant Zero: FixedValue=0
                    SubtractFunction TTRemaining
                      ExpressionFunction ShellGrowthTT
                        Expression=[Phenology].EarlyPodDevelopment.Target+[Phenology].EarlyGrainFilling.Target+[Phenology].MidGrainFilling.Target
                      ExpressionFunction ShellGrowthTTComplete
                        Expression=[Phenology].EarlyPodDevelopment.ProgressThroughPhase+[Phenology].EarlyGrainFilling.ProgressThroughPhase+[Phenology].MidGrainFilling.ProgressThroughPhase
                  VariableReference ThermalTime: VariableName=[Phenology].ThermalTime
            Constant StructuralFraction: FixedValue=1
          Constant Metabolic: FixedValue=0
          StorageDMDemandFunction Storage
            SubtractFunction StorageFraction
              Constant One: FixedValue=1
              VariableReference StructuralFraction: VariableName=[Shell].DMDemands.Structural.StructuralFraction
          Constant QStructuralPriority: FixedValue=1
          Constant QMetabolicPriority: FixedValue=1
          Constant QStoragePriority: FixedValue=1
        NutrientDemandFunctions NDemands
          MultiplyFunction Structural
            VariableReference MinNconc: VariableName=[Shell].minimumNconc
            VariableReference PotentialDMAllocation: VariableName=[Shell].potentialDMAllocation.Structural
          StorageNDemandFunction Storage
            VariableReference NitrogenDemandSwitch: VariableName=[Shell].nitrogenDemandSwitch
            VariableReference MaxNconc: VariableName=[Shell].maximumNconc
          Constant Metabolic: FixedValue=0
          Constant QStructuralPriority: FixedValue=1
          Constant QMetabolicPriority: FixedValue=1
          Constant QStoragePriority: FixedValue=1
        RetranslocateNonStructural RetranslocateNitrogen
        NutrientPoolFunctions InitialWt
          Constant Structural: FixedValue=0; Units=g/m^2
          Constant Metabolic: FixedValue=0
          Constant Storage: FixedValue=0
        MultiplyFunction PotentialHarvestIndex
          VariableReference PodHarvestIndex: VariableName=[Pod].PotentialHarvestIndex
          Constant ShellFraction: FixedValue=0.28; Units=0-1
        DivideFunction HarvestIndex
          VariableReference ShellWt: VariableName=[Shell].Wt
          VariableReference AboveGroundWt: VariableName=[AboveGround].Wt
        Constant Photosynthesis: FixedValue=0
        VariableReference initialNConcFunction: VariableName=[Shell].MinimumNConc
      GenericOrgan Stem: IsAboveGround=true
        Constant NReallocationFactor: FixedValue=1
        Constant NRetranslocationFactor: FixedValue=0.5
        PhaseLookup DMRetranslocationFactor
          PhaseLookupValue Vegetative: Start=Emergence; End=EndCanopyDevelopment
            Constant RetranslocationFactor: FixedValue=0
          PhaseLookupValue GrainFilling: Start=EndCanopyDevelopment; End=EndGrainFill
            Constant RetranslocationFactor: FixedValue=0.2
        LinearInterpolationFunction MaximumNConc
          XYPairs: X=[3, 4, 5]; Y=[0.025, 0.02, 0.015]
          VariableReference XValue: VariableName=[Phenology].Stage
        Constant MinimumNConc: FixedValue=0.006
        PhaseLookupValue NitrogenDemandSwitch: Start=Emergence; End=StartGrainFilling
          Constant: FixedValue=1
        BiomassRemoval BiomassRemovalDefaults: HarvestFractionLiveToRemove=0; HarvestFractionDeadToRemove=0; HarvestFractionLiveToResidue=1; HarvestFractionDeadToResidue=1
        PhaseLookup SenescenceRate
          PhaseLookupValue PostCanopyPhase: Start=EndCanopyDevelopment; End=Maturity
            MinimumFunction Rate
              DivideFunction Fraction
                VariableReference TT: VariableName=[Phenology].ThermalTime
                SubtractFunction TTRemaining
                  ExpressionFunction PostCanopyTT
                    Expression=[Phenology].EarlyPodDevelopment.Target+[Phenology].EarlyGrainFilling.Target+[Phenology].MidGrainFilling.Target+[Phenology].LateGrainFilling.Target
                  ExpressionFunction PostCanopyTTComplete
                    Expression=[Phenology].MidGrainFilling.ProgressThroughPhase+[Phenology].LateGrainFilling.ProgressThroughPhase
              Constant One: FixedValue=1
        Constant DetachmentRateFunction: FixedValue=0; Units=/d
        Constant MaintenanceRespirationFunction: FixedValue=0; Units=0-1
        Constant DMConversionEfficiency: FixedValue=1; Units=0-1
        Constant DMReallocationFactor: FixedValue=0
        VariableReference CriticalNConc: VariableName=[Stem].MinimumNConc
        Constant RemobilisationCost: FixedValue=0
        Constant CarbonConcentration: FixedValue=0.4
        NutrientDemandFunctions DMDemands
          MultiplyFunction Structural
            PhaseLookup Fraction
              PhaseLookupValue StemGrowthPhase: Start=Emergence; End=EndCanopyDevelopment
                Memo
                  This approach is based upon that used in [robertson_simulation_2002].
                Constant Fraction: FixedValue=0.9
              PhaseLookupValue PodAndGrainGrowth: Start=EndCanopyDevelopment; End=EndGrainFill
                Constant Fraction: FixedValue=0
            VariableReference DMDemand: VariableName=[Stem].PotentialGrowth
          Constant Metabolic: FixedValue=0
          MultiplyFunction Storage
            VariableReference DMDemand: VariableName=[Stem].PotentialGrowth
            SubtractFunction StorageFraction
              Constant One: FixedValue=1
              VariableReference StructuralFraction: VariableName=[Stem].DMDemands.Structural.Fraction
          Constant QStructuralPriority: FixedValue=1
          Constant QMetabolicPriority: FixedValue=1
          Constant QStoragePriority: FixedValue=1
        NutrientDemandFunctions NDemands
          MultiplyFunction Structural
            VariableReference MinNconc: VariableName=[Stem].minimumNconc
            VariableReference PotentialDMAllocation: VariableName=[Stem].potentialDMAllocation.Structural
          MultiplyFunction Metabolic
            SubtractFunction MetabolicNconc
              VariableReference CritNconc: VariableName=[Stem].criticalNConc
              VariableReference MinNconc: VariableName=[Stem].minimumNconc
            VariableReference PotentialDMAllocation: VariableName=[Stem].potentialDMAllocation.Structural
          StorageNDemandFunction Storage
            VariableReference NitrogenDemandSwitch: VariableName=[Stem].nitrogenDemandSwitch
            VariableReference MaxNconc: VariableName=[Stem].maximumNconc
          Constant QStructuralPriority: FixedValue=1
          Constant QMetabolicPriority: FixedValue=1
          Constant QStoragePriority: FixedValue=1
        PartitionFractionDemandFunction PotentialGrowth
          PhaseLookup PartitionFraction
            PhaseLookupValue StemGrowthPhase: Start=Emergence; End=EndPodDevelopment
              Constant StemFraction: FixedValue=0.4
            PhaseLookupValue GrainFilling: Start=EndPodDevelopment; End=EndGrainFill
              Constant StemFraction: FixedValue=0
        RetranslocateNonStructural RetranslocateNitrogen
        NutrientPoolFunctions InitialWt: same as Replacements.Lentil.Shell.InitialWt
        Constant Photosynthesis: FixedValue=0
        VariableReference initialNConcFunction: VariableName=[Stem].MinimumNConc
      CompositeBiomass AboveGround: OrganNames=[Leaf, Stem, Grain, Shell]; IncludeLive=true; IncludeDead=true
      CompositeBiomass BelowGround: OrganNames=[Root, Nodule]; IncludeLive=true; IncludeDead=true
      CompositeBiomass AboveGroundLive: OrganNames=[Leaf, Stem, Grain, Shell]; IncludeLive=true; IncludeDead=false
      CompositeBiomass Total: OrganNames=[Leaf, Stem, Grain, Shell, Root, Nodule]; IncludeLive=true; IncludeDead=true
      CompositeBiomass TotalLive: OrganNames=[Leaf, Stem, Grain, Shell, Root, Nodule]; IncludeLive=true; IncludeDead=false
      CompositeBiomass TotalDead: OrganNames=[Leaf, Stem, Grain, Shell, Root, Nodule]; IncludeLive=false; IncludeDead=true
      CompositeBiomass Pod: OrganNames=[Shell, Grain]; IncludeLive=true; IncludeDead=true
        DivideFunction HarvestIndex
          VariableReference PodWt: VariableName=[Pod].Wt
          VariableReference AboveGroundWt: VariableName=[AboveGround].Wt
        Constant PotentialHarvestIndex: FixedValue=0.5
          Memo
            This approach is based upon that used in [robertson_simulation_2002].
      Folder Cultivars
        Cultivar Aldinga
        Cultivar Boomer
        Cultivar CIPAL0901
        Cultivar CIPAL1504
        Cultivar CIPAL1701
        Cultivar Commando
        Cultivar Indianhead
        Cultivar Matilda
        Cultivar Nipper
        Cultivar Nugget
        Cultivar Northfield
        Cultivar Ace
        Cultivar Blitz
        Cultivar Bolt
        Cultivar Flash
        Cultivar GreenField
        Cultivar Giant
        Cultivar Hurricane
        Cultivar Jumbo
        Cultivar Jumbo2
      Constant MortalityRate: FixedValue=0
      Constant SeedMortalityRate: FixedValue=0
    Report DailyReport: EventNames=[Clock].EndOfDay
      VariableNames:
        [Clock].Today
        [Lentil].AboveGround.Wt
        [Lentil].Phenology.Stage
        sum([Soil].Water.MM)
    Report HarvestReport: EventNames=[Lentil].Harvesting
      VariableNames:
        [Clock].Today as Date
        [Sowing].Script.CultivarName
        [Sowing].Script.SowDate
        [Lentil].Phenology.EmergenceDAS
        [Lentil].Phenology.StartFloweringDAS
        [Lentil].Phenology.PodEmergenceDAS
        [Lentil].Phenology.MaturityDAS
        [Lentil].Grain.Wt
        [Lentil].Grain.Size
        [Lentil].AboveGround.Wt
        [Lentil].Grain.HarvestIndex
        [Lentil].Phenology.CurrentStageName
  Experiment Roseworthy
    Memo
      Reference: Lake, Lachlan, and Victor O. Sadras. ‘Lentil Yield and Crop Growth Rate Are Coupled under Stress but Uncoupled under Favourable Conditions’. European Journal of Agronomy 126 (1 May 2021): 126266. https://doi.org/10.1016/j.eja.2021.126266.

      Pant material, environments and experimental design:

      We established a factorial experiment with 20 lentil lines varying in seed type and phenology.

      Crops were grown in eight environments that resulted from the combinationof two seasons (2018, 2019), two sowing dates and two water regimes. Early sowings were on the 24th of April 2018 and the 29th April 2019, and the late sowings on the 6th of June 2018 and 24th of June 2019. Early-sown crops were irrigated or rainfed. Rainout shelters were set on earlysown crops to exclude rainfall from 26th June 2018 to harvest and from 1st August 2019 to harvest. Late-sown crops were irrigated or rainfed.

      Each experimental plot comprised six rows, 0.23m apart, 5m long, with target plant density 120 plants/m2.

      Crops were sown after barley on calcic luvisol soil at Roseworthy (34.35, 138.69), South Australia. At sowing, we added 80kg/h amonoammonium phosphate.

      Daily weather data were obtained from the Roseworthy weather station of the Australian Bureau of Meteorology. The amount of irrigation was added to the rainfall of the correponding date in the daily weather data, and the rainfall was set to 0 during rainout period.
    Factors
      Permutation
        Factor _Treat
          CompositeFactor 24Apr2018Irrigated
            Specifications:
              [Sowing].Script.SowDate=24-Apr
              [IrrigationApplications]
            Operations IrrigationApplications
              2018-06-01  [Irrigation].Apply (35);
          CompositeFactor 24Apr2018Rainout
            Specifications:
              [Sowing].Script.SowDate=24-Apr
              [ClimateController]
            Manager ClimateController
              AllowControl = True
              EnableDate = 06/26/2018 00:00:00
              WithinYearControl = False
              ControlStart =
              ControlEnd =
              RainfallMultiplier = 0
              RainfallAddition = 0
              RadiationMultiplier = 1
              RadiationAddition = 0
              MinTMultiplier = 1
              MinTAddition = 0
              MaxTMultiplier = 1
              MaxTAddition = 0
              WindMultiplier = 1
              WindAddition = 0
              VPMultiplier = 1
              VPAddition = 0
```csharp
using Newtonsoft.Json;
using APSIM.Shared.Utilities;
using Models.Interfaces;
using Models.Soils;
using Models.PMF;
using Models.Core;
using System.Xml.Serialization;
using System;
using System.Linq;
using Models.Soils.Nutrients;
using Models.Climate;

namespace Models
{
    [Serializable]
    public class Script : Model
    {
        // - Links to APSIM models
        [Link] Zone zone;
        [Link] Clock clock;
        [Link] Weather weather;
        [Link] ISummary summary = null;

        // - Paramters for this manager
        [Description("Enable? Set to 'No' to completely disable this manager")] public bool AllowControl { get; set; }

        [Separator("General settings")]
        [Description("Start the climate controls beginning on date (dd/mmm/yyyy): ")] public DateTime EnableDate { get; set; }
        [Description("Implement climate control only during part of the year?")] public bool WithinYearControl { get; set; }
        [Description("Within each year, the first day to start the climate controls is (dd-mmm)")] public string ControlStart { get; set; }
        [Description("Within each year, end last day of climate control is (dd-mmm)")] public string ControlEnd { get; set; }

        [Separator("Rainfall")]
        [Description("Rainfall multiplier (-): ")] public double RainfallMultiplier { get; set; }
        [Description("Rainfall addition (mm): ")] public double RainfallAddition { get; set; }

        [Separator("Radiation")]
        [Description("Radiation multiplier (-): ")] public double RadiationMultiplier { get; set; }
        [Description("Radiation addition (MJ/m2): ")] public double RadiationAddition { get; set; }

        [Separator("Minimum temperature")]
        [Description("Minimum temperature multiplier (-): ")] public double MinTMultiplier { get; set; }
        [Description("Minimum temperature addition (C): ")] public double MinTAddition { get; set; }

        [Separator("Maximum temperature")]
        [Description("Maximum temperature multiplier (-): ")] public double MaxTMultiplier { get; set; }
        [Description("Maximum temperature addition (C): ")] public double MaxTAddition { get; set; }

        [Separator("Wind speed")]
        [Description("Wind speed multiplier (-): ")] public double WindMultiplier { get; set; }
        [Description("Wind speed addition (m/s): ")] public double WindAddition { get; set; }

        [Separator("Vapour pressure")]
        [Description("Vapour pressure multiplier (-): ")] public double VPMultiplier { get; set; }
        [Description("Vapour pressure addition (hPa): ")] public double VPAddition { get; set; }

        [JsonIgnore] public bool DoControl { get; set; }
        [JsonIgnore] public int DoControlInt { get; set; }

        [EventSubscribe("PreparingNewWeatherData")] private void OnDoManagement(object sender, EventArgs e)
        {
            // Check if this manager is enabled
            if ((AllowControl) && (clock.Today >= EnableDate))
            {
                DoControl = true;
                if (WithinYearControl)
                    DoControl = DateUtilities.WithinDates(ControlStart, clock.Today, ControlEnd); 
            }

            if (DoControl)
                DoControlInt = 1;
            else
                DoControlInt = 0;

            if (DoControl)
            {
                // do the weather alterations 
                weather.Rain = RainfallMultiplier * weather.Rain + RainfallAddition;
                weather.Radn = RadiationMultiplier * weather.Radn + RadiationAddition;
                weather.MinT = MinTMultiplier * weather.MinT + MinTAddition;
                weather.MaxT = MaxTMultiplier * weather.MaxT + MaxTAddition;
                weather.Wind = WindMultiplier * weather.Wind + WindAddition;
                weather.VP = VPMultiplier * weather.VP + VPAddition;
            }
        }
    }
}
```
          CompositeFactor 6Jun2018Irrigated
            Specifications:
              [Sowing].Script.SowDate=6-Jun
              [IrrigationApplications]
            Operations IrrigationApplications
              2018-08-01  [Irrigation].Apply (35);
          CompositeFactor 6Jun2018Rainfed: Specifications=[Sowing].Script.SowDate=6-Jun
        Factor _Geno
          Specification=[Sowing].Script.CultivarName=Ace,Aldinga,Blitz,Bolt,Boomer,CIPAL0901,CIPAL1504,CIPAL1701,Commando,Flash,Giant,Greenfield,Hurricane,Indianhead,Jumbo,Jumbo2,Matilda,Nipper,Northfield,Nugget
    Simulation Roseworthy2018
      Memo
        Early sowing in 2018 with irrigation. Sown at 24th of April 2018.
        The amount and date of irrigation are merged to rainfall in the weather data.
      Weather: FileName=Roseworthy.met
      Clock: Start=2018-04-24; End=2020-11-30
      Summary summaryfile
      SoilArbitrator Soil Arbitrator
      Zone Field: Area=1; Slope=0; AspectAngle=0; Altitude=50
        Manager Sowing
          Crop = [Lentil]
          SowDate =
          CultivarName =
          SowingDepth = 50
          RowSpacing = 230
          Population = 120
```csharp
using APSIM.Shared.Utilities;
using Models.Utilities;
using Models.Soils;
using Models.PMF;
using Models.Core;
using System;
using System.Linq;
using System.Diagnostics;

namespace Models
{
    [Serializable]
    public class Script : Model
    {
        [Link] Clock Clock;
        [Link] Fertiliser Fertiliser;
        [Link] Summary Summary;
        [Link] Soil Soil;
        
        [Description("Crop")]
        public IPlant Crop { get; set; }

        [Description("Sowing date (d-mmm)")]
        public string SowDate { get; set; }

        [Display(Type = DisplayType.CultivarName)]
        [Description("Cultivar to be sown")]
        public string CultivarName { get; set; }

        [Description("Sowing depth (mm)")]
        public double SowingDepth { get; set; }

        [Description("Row spacing (mm)")]
        public double RowSpacing { get; set; }

        [Description("Plant population (/m2)")]
        public double Population { get; set; }

        [EventSubscribe("DoManagement")]
        private void OnDoManagement(object sender, EventArgs e)
        {
            if (DateUtilities.WithinDates(SowDate, Clock.Today, SowDate))
            {
                Crop.Sow(population: Population, cultivar: CultivarName, depth: SowingDepth, rowSpacing: RowSpacing);    
            }
        }
    }
}
```
        Plant Lentil
        Soil: Latitude=0; Longitude=0
          Water: Thickness=[150, 150, 150, 150, 150, 150, 300, 300, 300]; InitialPAWmm=193.05; RelativeTo=LL15; FilledFromTop=false
            InitialValues=[0.304, 0.31, 0.31, 0.324, 0.328, 0.328, 0.325, 0.337, 0.35]
          Physical
            Thickness  ParticleSizeSand  ParticleSizeSilt  ParticleSizeClay  Rocks     BD    AirDry  LL15   DUL    SAT
            150        5                 65                30                0.176532  1.56  0.053   0.19   0.304  0.315
            150        5                 65                30                0.167856  1.52  0.08    0.21   0.31   0.33
            150        5                 65                30                0.193051  1.46  0.21    0.21   0.31   0.337
            150        5                 65                30                0.185868  1.46  0.223   0.223  0.324  0.34
            150        5                 65                30                0.212344  1.42  0.219   0.219  0.328  0.34
            150        5                 65                30                0.210027  1.42  0.219   0.219  0.328  0.341
            300        5                 65                30                0.17629   1.46  0.219   0.219  0.325  0.344
            300        5                 65                30                0.142683  1.5   0.229   0.229  0.337  0.346
            300        5                 65                30                0         1.53  0.237   0.237  0.35   0.37
            Rocks, ParticleSizeSand, ParticleSizeSilt, ParticleSizeClay source: Calculated
            SoilCrop LentilSoil
              LL=[0.19, 0.21, 0.21, 0.235, 0.233, 0.242, 0.248, 0.277, 0.285]
              KL=[0.08, 0.08, 0.08, 0.08, 0.06, 0.09, 0.06, 0.05, 0.03]
              XF=[1, 1, 1, 1, 1, 1, 1, 1, 1]
          WaterBalance SoilWater: SummerDate=1-Nov; SummerU=1.5; SummerCona=6.6; WinterDate=1-Apr; WinterU=1.5; WinterCona=6.6; DiffusConst=88; DiffusSlope=35; Salb=0.2; CN2Bare=85; CNRed=20; CNCov=0.8; DischargeWidth=5; CatchmentArea=10; PSIDul=-100; Thickness=[100, 100, 300, 300, 400, 600]; SWCON=[0.5, 0.5, 0.5, 0.5, 0.5, 0.5]
          Organic: FOMCNRatio=33; CarbonUnits=Total
            Thickness  Carbon  SoilCNRatio  FBiom  FInert  FOM
            150        1.27    14.5         0.05   0.39    0
            150        0.59    14.5         0.02   0.47    0
            150        0.34    14.5         0.015  0.52    0
            150        0.34    14.5         0.01   0.62    0
            150        0.26    14.5         0.01   0.74    0
            150        0.26    14.5         0.01   0.83    0
            300        0.25    14.5         0.01   0.93    0
            300        0.19    14.5         0.01   0.93    0
            300        0.21    14.5         0.01   0.93    0
          Chemical: Thickness=[100, 100, 300, 300, 400, 600]; PH=[6.5, 6.6, 7, 7, 6.5, 6.1]; PHUnits=Water
          CERESSoilTemperature Temperature
          Nutrient
          Solute NO3: Thickness=[100, 100, 300, 300, 400, 600]; InitialValues=[2, 2, 2, 2, 2, 2]; InitialValuesUnits=ppm; WaterTableConcentration=0; D0=0; DepthConstant=0; MaxDepthSoluteAccessible=0; RunoffEffectivenessAtMovingSolute=0; MaxEffectiveRunoff=0
          Solute NH4: Thickness=[100, 100, 300, 300, 400, 600]; InitialValues=[1, 1, 1, 1, 1, 1]; InitialValuesUnits=ppm; WaterTableConcentration=0; D0=0; DepthConstant=0; MaxDepthSoluteAccessible=0; RunoffEffectivenessAtMovingSolute=0; MaxEffectiveRunoff=0
          Solute Urea: Thickness=[100, 100, 300, 300, 400, 600]; InitialValues=[0, 0, 0, 0, 0, 0]; InitialValuesUnits=kg/ha; WaterTableConcentration=0; D0=0; DepthConstant=0; MaxDepthSoluteAccessible=0; RunoffEffectivenessAtMovingSolute=0; MaxEffectiveRunoff=0
        MicroClimate: a_interception=0; b_interception=1; c_interception=0; d_interception=0; SoilHeatFluxFraction=0.4; MinimumHeightDiffForNewLayer=0; NightInterceptionFraction=0.5; ReferenceHeight=1
        Irrigation
        Fertiliser
        SurfaceOrganicMatter: InitialResidueName=maize; InitialResidueType=maize; InitialResidueMass=500; InitialStandingFraction=0; InitialCPR=0; InitialCNR=65
        Manager Harvesting
```csharp
using Models.PMF.Phen;
using System;
using Models.Core;
using System.Collections.Generic;
using System.Text;
using Models.Soils;
using Models.PMF;
using Models;
using System.Xml.Serialization;
using APSIM.Shared.Utilities;
using Newtonsoft.Json;

namespace Models
{
    [Serializable] 
    public class Script : Model
    {      
        [Link] private Plant Lentil;
        [Link] private Zone zone;
        [Link(Type = LinkType.Path, Path = "[Lentil].Phenology")]
        private Phenology phenology;
        [Link] private Simulation sim;
        [Link] private Clock Clock;
        [JsonIgnore] public bool Harvested { get; set; }
        [JsonIgnore] public bool EndSet { get; set; }
        
        [EventSubscribe("StartOfSimulation")]
        private void OnSimulationCommencing(object sender, EventArgs e)
        {
        	Harvested = false;
            EndSet = false;
        }       
        
        [EventSubscribe("DoManagement")]
        private void OnDoManagement(object sender, EventArgs e)
        {
        	if (phenology.CurrentPhase.Name=="ReadyForHarvesting")
           {
		       Lentil.Harvest();
		       Lentil.EndCrop();
		       Harvested = true;
           }
           
		   if ((Harvested == true) && (EndSet == false))
		   {
		       sim.Set("Clock.EndDate", Clock.Today.AddDays(1));
		       EndSet = true;
		   }
        }
        
    }
}
```
        Report HarvestReport: EventNames=[Lentil].Harvesting
          VariableNames:
            [Clock].Today as Date
            [Sowing].Script.CultivarName
            [Sowing].Script.SowDate
            [Lentil].Phenology.EmergenceDAS
            [Lentil].Phenology.BuddingDAS
            [Lentil].Phenology.FloweringDAS
            [Lentil].Phenology.PoddingDAS
            [Lentil].Phenology.MaturityDAS
            [Lentil].Grain.Wt
            [Lentil].Grain.Live.Wt
            [Lentil].Grain.Size
            [Lentil].AboveGround.Wt
            [Lentil].Grain.HarvestIndex
        Report DailyReport
        Operations IrrigationApplications
        Manager ClimateController
          AllowControl = False
          EnableDate = 01/01/0001 00:00:00
          WithinYearControl = False
          ControlStart =
          ControlEnd =
          RainfallMultiplier = 1
          RainfallAddition = 0
          RadiationMultiplier = 1
          RadiationAddition = 0
          MinTMultiplier = 1
          MinTAddition = 0
          MaxTMultiplier = 1
          MaxTAddition = 0
          WindMultiplier = 1
          WindAddition = 0
          VPMultiplier = 1
          VPAddition = 0
          script: same as in Roseworthy.Factors.Permutation._Treat.24Apr2018Rainout.ClimateController
        Operations Sow
  Simulation 18_ROS_1RO
    Memo
      Early sowing in 2018 with rainout shelter to exclude rainfall from 26th June 2018 to harvest, so the amounts of rainfall in these days are set to 0 in weather data.
      Sown at 24th of April 2018.
    Weather: FileName=Met/18_ROS_1RO.met
    Clock: Start=2018-04-24; End=2018-11-30
    Summary summaryfile
    SoilArbitrator Soil Arbitrator
    Zone Field: Area=1; Slope=0; AspectAngle=0; Altitude=50
      Soil Sandy loam over light-medium clays (Roseworthy No300): ASCOrder=Sodosol; ASCSubOrder=Red; SoilType=Sandy clay; Site=Roseworthy; NearestTown=Roseworthy; Region=Mid North; State=South Australia; Country=Australia; ApsoilNumber=300; Latitude=-34.5; Longitude=138.686; LocationAccuracy=+/- 20m; YearOfSampling=0
        DataSource=Characterisation 2005 by University of Adelaide, CSIRO Sustainable Ecosystems and DWLBC. Measurement site located adjacent to site described by Soil and Land Information Group, Department of Water, Land and Biodiversity Conservation, South Australia.
        Comments=Root depth: Wheat 130cm, Canola 100cm, Pea 100cm. Low-moderate clay duplex soil with moderate CEC, moderate-high bulk density.Texture change about 10cm. Slaking or dispersion likely in the lower profile, whilst high ESP and mobility of boron below about 80cm will impede root growth.
        Physical
          Thickness  ParticleSizeSand  ParticleSizeSilt  ParticleSizeClay  BD    AirDry  LL15  DUL   SAT
          150        73                4                 22                1.57  0.04    0.08  0.18  0.38
          150        44                4                 52                1.38  0.144   0.18  0.3   0.45
          300        39                8                 53                1.32  0.18    0.18  0.33  0.47
          300        39                8                 52                1.53  0.18    0.18  0.3   0.39
          300        48                7                 45                1.69  0.18    0.18  0.27  0.33
          300        51                5                 43                1.73  0.18    0.18  0.23  0.32
          BD, DUL source: Field measured and checked for sensibility
          AirDry, LL15 source: Estimated based on local knowledge
          SAT source: Calculated from measured, estimated or calculated BD
          SoilCrop wheatSoil: LL=[0.08, 0.18, 0.18, 0.18, 0.23, 0.23]; KL=[0.06, 0.06, 0.04, 0.04, 0.03, 0.02]; XF=[1, 1, 1, 1, 0.4, 0.32]
            LL source: Field measured and checked for sensibility
          SoilCrop barleySoil: LL=[0.08, 0.18, 0.18, 0.18, 0.23, 0.23]; KL=[0.07, 0.07, 0.07, 0.05, 0.05, 0.05]; XF=[1, 1, 1, 1, 0.4, 0.32]
            LL source: Estimated based on local knowledge
          SoilCrop oatsSoil: LL=[0.08, 0.18, 0.18, 0.18, 0.23, 0.23]; KL=[0.06, 0.06, 0.04, 0.04, 0.03, 0.02]; XF=[1, 1, 1, 1, 0.4, 0.32]
            LL source: Estimated based on local knowledge
          SoilCrop canolaSoil: LL=[0.08, 0.18, 0.18, 0.25, 0.25, 0.23]; KL=[0.06, 0.06, 0.04, 0.04, 0.03, 0.02]; XF=[1, 1, 1, 1, 0.4, 0.32]
            LL source: Field measured and checked for sensibility
          SoilCrop peasSoil: LL=[0.07, 0.22, 0.22, 0.28, 0.27, 0.23]; KL=[0.06, 0.06, 0.06, 0.06, 0.06, 0.06]; XF=[1, 1, 1, 1, 0.4, 0.32]
            LL source: Field measured and checked for sensibility
        WaterBalance SoilWater: SummerDate=1-Nov; SummerU=6; SummerCona=3.5; WinterDate=1-Apr; WinterU=2; WinterCona=2; DiffusConst=88; DiffusSlope=35; Salb=0.13; CN2Bare=73; CNRed=20; CNCov=0.8; PSIDul=-100; Thickness=[150, 150, 300, 300, 300, 300]; SWCON=[0.5, 0.5, 0.5, 0.5, 0.3, 0.3]
        Organic: FOMCNRatio=45; CarbonUnits=Total
          Thickness  Carbon  SoilCNRatio  FBiom  FInert  FOM
          150        1.56    12.5         0.04   0.4     585.896
          150        1.248   12.5         0.02   0.5     434.043
          300        0.78    12.5         0.02   0.7     238.208
          300        0.39    12.5         0.02   1       130.731
          300        0.234   12.5         0.01   1       71.7468
          300        0.156   12.5         0.01   1       39.3755
        Chemical: PHUnits=Water
          Thickness  PH   EC   ESP
          150        7.8  0.1  3.64964
          150        8.3  0.2  4.66926
          300        9.1  0.2  8.47458
          300        9.9  0.5  27.6
          300        9.7  0.9  37.5479
          300        9.5  1    41.129
          EC, CL, PH source: Measured
          ESP source: C
        Nutrient
        Water: Thickness=[150, 150, 300, 300, 300, 300]; InitialValues=[0.07, 0.22, 0.22, 0.28, 0.27, 0.23]; InitialPAWmm=0; RelativeTo=peas; FilledFromTop=false
        CERESSoilTemperature
        Solute NO3: Thickness=[150, 150, 300, 300, 300, 300]; InitialValues=[1, 1, 1, 1, 1, 1]; InitialValuesUnits=ppm; WaterTableConcentration=0; D0=0; DepthConstant=0; MaxDepthSoluteAccessible=0; RunoffEffectivenessAtMovingSolute=0; MaxEffectiveRunoff=0
        Solute NH4: Thickness=[150, 150, 300, 300, 300, 300]; InitialValues=[0.1, 0.1, 0.1, 0.1, 0.1, 0.1]; InitialValuesUnits=ppm; WaterTableConcentration=0; D0=0; DepthConstant=0; MaxDepthSoluteAccessible=0; RunoffEffectivenessAtMovingSolute=0; MaxEffectiveRunoff=0
        Solute Urea: Thickness=[150, 150, 300, 300, 300, 300]; InitialValues=[0, 0, 0, 0, 0, 0]; InitialValuesUnits=ppm; WaterTableConcentration=0; D0=0; DepthConstant=0; MaxDepthSoluteAccessible=0; RunoffEffectivenessAtMovingSolute=0; MaxEffectiveRunoff=0
      Plant Lentil
      MicroClimate: a_interception=0; b_interception=1; c_interception=0; d_interception=0; SoilHeatFluxFraction=0.4; MinimumHeightDiffForNewLayer=0; NightInterceptionFraction=0.5; ReferenceHeight=1
      Irrigation
      Fertiliser
      SurfaceOrganicMatter: InitialResidueName=maize; InitialResidueType=maize; InitialResidueMass=500; InitialStandingFraction=0; InitialCPR=0; InitialCNR=65
      Manager Sowing
        SowDate = 24-Apr
        CultivarName = Amethyst
        SowingDepth = 50
        RowSpacing = 230
        Population = 120
```csharp
using APSIM.Shared.Utilities;
using Models.Utilities;
using Models.Soils;
using Models.PMF;
using Models.Core;
using System;

namespace Models
{
    [Serializable]
    public class Script : Model
    {
        [Link] Clock Clock;
        [Link] Fertiliser Fertiliser;
        [Link] Summary Summary;
        [Link] Plant Canola;
        [Link] Soil Soil;
        Accumulator accumulatedRain;
        
        [Description("Sowing date (d-mmm)")]
        public string SowDate { get; set; }
        [Description("Cultivar to be sown")]
        public string CultivarName { get; set; }
        [Description("Sowing depth (mm)")]
        public double SowingDepth { get; set; }
        [Description("Row spacing (mm)")]
        public double RowSpacing { get; set; }
        [Description("Plant population (/m2)")]
        public double Population { get; set; }
        
        


        [EventSubscribe("DoManagement")]
        private void OnDoManagement(object sender, EventArgs e)
        {
        
            
            if (DateUtilities.WithinDates(SowDate, Clock.Today, SowDate))
            {
                Canola.Sow(population: Population, cultivar: CultivarName, depth: SowingDepth, rowSpacing: RowSpacing);    
            }
        
        }
        
    }
}
```
      Manager Fertilise at sowing
        Crop = [Lentil]
        FertiliserType = MAP
        Amount = 80
```csharp
using Models.Soils;
using System;
using Models.Core;
using Models.PMF;
namespace Models
{
    [Serializable]
    public class Script : Model
    {
        [Link] Clock Clock;
        [Link] Fertiliser Fertiliser;
        
        [Description("Crop to be fertilised")]
        public IPlant Crop { get; set; }

        [Description("Type of fertiliser to apply? ")] 
        public Fertiliser.Types FertiliserType { get; set; }
    
        [Description("Amount of fertiliser to be applied (kg/ha)")]
        public double Amount { get; set; }
        
        [EventSubscribe("Sowing")]
        private void OnSowing(object sender, EventArgs e)
        {
            Model crop = sender as Model;
            if (Crop != null && crop.Name.ToLower() == (Crop as IModel).Name.ToLower())
                Fertiliser.Apply(Amount: Amount, Type: FertiliserType);
        }
    }
}
```
      Manager Harvesting
```csharp
using Models.PMF.Phen;
using System;
using Models.Core;
using System.Collections.Generic;
using System.Text;
using Models.Soils;
using Models.PMF;
using Models;
using System.Xml.Serialization;
using APSIM.Shared.Utilities;

namespace Models
{
    [Serializable] 
    public class Script : Model
    {      
        [Link] private Plant Lentil;
        [Link] private Zone zone;
        [Link(Type = LinkType.Path, Path = "[Lentil].Phenology")]
        private Phenology phenology;
                    
        
        [EventSubscribe("StartOfSimulation")]
        private void OnSimulationCommencing(object sender, EventArgs e)
        {
        }       
        
        [EventSubscribe("DoManagement")]
        private void OnDoManagement(object sender, EventArgs e)
        {
        if (phenology.CurrentPhase.Name=="ReadyForHarvesting")
           {
           Lentil.Harvest();
           Lentil.EndCrop();
           }
        }
        
        [EventSubscribe("DoManagementCalculations")]
        private void OnDoManagementCalculations(object sender, EventArgs e)
        {
            
        }
    }
}
```
      Report: same as Roseworthy.Roseworthy2018.Field.HarvestReport
  Simulation 18_ROS_2IR
    Memo
      Late sowing in 2018 with irrigation. Sown on the 6th of June 2018.
      The amount and date of irrigation are merged to rainfall in the weather data.
    Weather: FileName=Met/18_ROS_2IR.met
    Clock: Start=2018-06-06; End=2018-12-31
    Summary summaryfile
    SoilArbitrator Soil Arbitrator
    Zone Field: same as 18_ROS_1RO.Field
  Simulation 18_ROS_2RF
    Memo
      Late sowing in 2018 with rainfed. Sown on the 6th of June 2018.
    Weather: FileName=Met/18_ROS_2RF.met
    Clock: Start=2018-06-06; End=2018-12-31
    Summary summaryfile
    SoilArbitrator Soil Arbitrator
    Zone Field: same as 18_ROS_1RO.Field
  Simulation 19_ROS_1IR
    Memo
      Early sowing in 2019 with irrigation. Sown on the 29th of Apr 2019.
      The amount and date of irrigation are merged to rainfall in the weather data.
    Weather: FileName=Met/19_ROS_1IR.met
    Clock: Start=2019-04-29; End=2019-12-05
    Summary summaryfile
    SoilArbitrator Soil Arbitrator
    Zone Field: same as 18_ROS_1RO.Field
  Simulation 19_ROS_1RO
    Memo
      Early sowing in 2019 with rainout shelter to exclude rainfall from 1st Aug 2019 to harvest, so the amounts of rainfall in these days are set to 0 in weather data.
      Sown on the 29th of Apr 2019.
    Weather: FileName=Met/19_ROS_1RO.met
    Clock: Start=2019-04-29; End=2019-12-05
    Summary summaryfile
    SoilArbitrator Soil Arbitrator
    Zone Field: same as 18_ROS_1RO.Field
  Simulation 19_ROS_2IR
    Memo
      Late sowing in 2019 with irrigation. Sown on the 24th of June 2019.
      The amount and date of irrigation are merged to rainfall in the weather data.
    Weather: FileName=Met/19_ROS_2IR.met
    Clock: Start=2019-06-24; End=2019-12-31
    Summary summaryfile
    SoilArbitrator Soil Arbitrator
    Zone Field: same as 18_ROS_1RO.Field
  Simulation 19_ROS_2RF
    Memo
      Late sowing in 2019 with rainfed. Sown on the 24th of June 2019.
    Weather: FileName=Met/19_ROS_2RF.met
    Clock: Start=2019-06-24; End=2019-12-31
    Summary summaryfile
    SoilArbitrator Soil Arbitrator
    Zone Field: Area=1; Slope=0; AspectAngle=0; Altitude=50
      Soil Sandy loam over light-medium clays (Roseworthy No300): ASCOrder=Sodosol; ASCSubOrder=Red; SoilType=Sandy clay; Site=Roseworthy; NearestTown=Roseworthy; Region=Mid North; State=South Australia; Country=Australia; ApsoilNumber=300; Latitude=-34.5; Longitude=138.686; LocationAccuracy=+/- 20m; YearOfSampling=0
        DataSource=Characterisation 2005 by University of Adelaide, CSIRO Sustainable Ecosystems and DWLBC. Measurement site located adjacent to site described by Soil and Land Information Group, Department of Water, Land and Biodiversity Conservation, South Australia.
        Comments=Root depth: Wheat 130cm, Canola 100cm, Pea 100cm. Low-moderate clay duplex soil with moderate CEC, moderate-high bulk density.Texture change about 10cm. Slaking or dispersion likely in the lower profile, whilst high ESP and mobility of boron below about 80cm will impede root growth.
        Physical: same as 18_ROS_1RO.Field.Sandy loam over light-medium clays (Roseworthy No300).Physical
        WaterBalance SoilWater: same as 18_ROS_1RO.Field.Sandy loam over light-medium clays (Roseworthy No300).SoilWater
        Organic: FOMCNRatio=45; CarbonUnits=Total
          Thickness  Carbon  SoilCNRatio  FBiom  FInert  FOM
          150        1.56    12.5         0.04   0.4     585.896
          150        1.248   12.5         0.02   0.5     434.043
          300        0.78    12.5         0.02   0.7     238.208
          300        0.39    12.5         0.02   1       130.731
          300        0.234   12.5         0.01   1       71.747
          300        0.156   12.5         0.01   1       39.375
        Chemical: same as 18_ROS_1RO.Field.Sandy loam over light-medium clays (Roseworthy No300).Chemical
        Nutrient
        Water: Thickness=[150, 150, 300, 300, 300, 300]; InitialValues=[0.07, 0.22, 0.22, 0.28, 0.27, 0.23]; InitialPAWmm=0; RelativeTo=peas; FilledFromTop=false
        CERESSoilTemperature
        Solute NO3: same as 18_ROS_1RO.Field.Sandy loam over light-medium clays (Roseworthy No300).NO3
        Solute NH4: same as 18_ROS_1RO.Field.Sandy loam over light-medium clays (Roseworthy No300).NH4
        Solute Urea: same as 18_ROS_1RO.Field.Sandy loam over light-medium clays (Roseworthy No300).Urea
      Plant Lentil
      MicroClimate: a_interception=0; b_interception=1; c_interception=0; d_interception=0; SoilHeatFluxFraction=0.4; MinimumHeightDiffForNewLayer=0; NightInterceptionFraction=0.5; ReferenceHeight=1
      Irrigation
      Fertiliser
      SurfaceOrganicMatter: InitialResidueName=maize; InitialResidueType=maize; InitialResidueMass=500; InitialStandingFraction=0; InitialCPR=0; InitialCNR=65
      Manager Sowing: same as 18_ROS_1RO.Field.Sowing
      Manager Fertilise at sowing: same as 18_ROS_1RO.Field.Fertilise at sowing
      Manager Harvesting: same as 18_ROS_1RO.Field.Harvesting
      Report: same as Roseworthy.Roseworthy2018.Field.HarvestReport
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